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/batch
! ANSYS input file written by Workbench version 2025 R2
! File used for geometry attach: C:\Users\nicol\Desktop\full_plate.step
/title,full_plate--Static Structural (A5)
/COM,/COM,     ANSYSMotion, 2025.2
/com,--- Data in consistent NMM units. See Solving Units in the help system for more information.
/units,MPA
/prep7
! Turn off shape checking because checks already performed inside WB mesher.
! See help system for more information.
SHPP,OFF,,NOWARN
etcon,set             ! allow ANSYS to choose best KEYOP's for 180x elements, resets any applicable keyopt to MAPDL defaults
/com,*********** Send User Defined Coordinate System(s) ***********
csys,0
/com,*********** Nodes for the whole assembly ***********
nblock,3,,16324
(1i9,3e20.9e3)
        1     6.000000000E+00    -6.800000000E+01     7.000000000E+00
        2     4.854101966E+00    -6.447328849E+01     7.000000000E+00
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-1
/com,*********** Elements for Body 1 'Plate' ***********
et,1,187
MAT,1 $ TYPE,1 $ REAL,1 $ SECNUM,1 $ ESYS,0
eblock,11,COMPACT,,9599
(11i9)
        1     1357     1715     2136     1846    11818    14154    11824    11821    14149    14602
        2     1357     1784     2136     1715    11819    14439    11824    11818    14147    14154
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-1
secnum,1    ! reset the section ID to default
toffst,273.15,      ! Temperature offset from absolute zero
/com,*********** Set Reference Temperature ***********
tref,22.
/com,*********** Send Materials ***********
Temperature = 'TEMP' ! Temperature
MP,DENS,1,1.14e-09,	! tonne mm^-3
MP,EX,1,1111,	! tonne s^-2 mm^-1
MP,NUXY,1,0.3499,
MP,ALPX,1,0.0001467,	! C^-1
MP,KXX,1,0.2428,	! tonne mm s^-3 C^-1
MP,C,1,1500000000,	! mm^2 s^-2 C^-1
MP,RSVX,1,1.834e+15,	! ohm mm
MP,LSST,1,0.1171,
MP,PERX,1,14.38,

!************************* Model Summary ********************
!Plate,	Plastic, PA6,	matid,	1
!************************* End Model Summary ********************
CMBLOCK,SEEDS   ,NODE,      285
(8i10)
        11        34       -45        89      -101       287       294       346
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CMBLOCK,FIXED_SUPPORT,NODE,      332
(8i10)
        11        34       -45        89      -101       157      -162       166
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et,2,200,7
MAT,0 $ TYPE,2 $ REAL,0 $ SECNUM,2 $ ESYS,0
eblock,11,COMPACT,,70
(11i9)
    11538      224      222      231      231     3695     3698      231     3716
    11539      214      224      231      231     3626     3716      231     3627
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-1
secnum,1    ! reset the section ID to default
CMBLOCK,HOLE    ,ELEM,        2
(8i10)
     11538    -11607
/com,*********** Fixed Supports ***********
CMBLOCK,_FIXEDSU,NODE,      332
(8i10)
        11        34       -45        89      -101       157      -162       166
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cmsel,s,_FIXEDSU
d,all,all
nsel,all
/com,*********** Create Bearing Load ***********
et,3,154
MAT,3 $ TYPE,3 $ REAL,3 $ SECNUM,3 $ ESYS,0
eblock,11,COMPACT,,70
(11i9)
    11608        1        2      211      211     2137     2146      211     2139
    11609       10        1      212      212     2138     2140      212     2204
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-1
secnum,1    ! reset the section ID to default
esel,s,type,,3
keyop,3,7,1         ! Use original area so load is constant in large deformation
esel,all
fini
/com,****************************************************************************
/com,*************************    SOLUTION       ********************************
/com,****************************************************************************
/solu
antype,0                   ! static analysis
_thickRatio=  1     ! Ratio of thick parts in the model
eqsl,pcg,1e-8,,,,,,1
cntr,print,1               ! print out contact info and also make no initial contact an error
cncheck,dmp		!	Enable program controlled contact splitting for distributed memory parallel run
dmpoption,emat,no             ! Don't combine emat file for DANSYS
dmpoption,esav,no             ! Don't combine esav file for DANSYS
nldiag,cont,iter           ! print out contact info each equilibrium iteration
rescontrol,,none                 ! Do not keep any restart files
/com,****************************************************
/com,******************* SOLVE FOR LS 1 OF 1 ****************
esel,s,type,,3
sfe,all,5,pres,0,0.0,1.,0.,0.
local,11,0,0,0,0,-90.,0.,0.
csys,0
*set,_v1,0.
*set,_v2,-1.
*set,_v3,0.
*get,_necurr,elem,,count
_ecurr=0
_total=0
*do,_i,1,_necurr
  _ecurr = ELNEXT(_ecurr)
  _normx = NORMNX(NELEM(_ecurr,1),NELEM(_ecurr,2),NELEM(_ecurr,3))
  _normy = NORMNY(NELEM(_ecurr,1),NELEM(_ecurr,2),NELEM(_ecurr,3))
  _normz = NORMNZ(NELEM(_ecurr,1),NELEM(_ecurr,2),NELEM(_ecurr,3))
  _normmag = sqrt(_normx*_normx + _normy*_normy + _normz*_normz )
  _normx = _normx/_normmag
  _normy = _normy/_normmag
  _normz = _normz/_normmag
  _dot = _normx*_v1+_normy*_v2+_normz*_v3
  *if,_dot,gt,-.00001,then
    esel,u,elem,,_ecurr
  *else
    csys,11
    *get,_indd,elem,_ecurr,aproj,x
    csys,0
    _total=_total+_indd
  *endif
*enddo
*get,_necurr,elem,,count
*if,_necurr,eq,0,then
  *msg,error
  NO ELEMENTS ARE SELECTED TO APPLY BEARING LOAD TO. &
  IT IS LIKELY THAT THE BEARING LOAD IS IN THE WRONG DIRECTION
*endif
*set,_mag,1000.
_mag=_mag/_total
sfe,all,5,pres,0,_mag,0.,-1000.,0.
nsel,all
esel,all
nsub,1,1,1
time,1.
outres,erase
outres,all,none
outres,nsol,all,
outres,rsol,all
outres,eangl,all
outres,etmp,all
outres,veng,all
outres,strs,all,
outres,epel,all,
outres,eppl,all,
outres,cont,all,
! *********** WB SOLVE COMMAND ***********
! check interactive state
*get,ANSINTER_,active,,int
*if,ANSINTER_,ne,0,then
/eof
*endif
solve
/com *************** Write FE CONNECTORS *********
CEWRITE,file,ce,,INTE
/com,****************************************************
/com,*************** FINISHED SOLVE FOR LS 1 *************
*get,_NSOLTHREADS,active,0,ntfs
*get,_NSOLPROCESSES,active,0,npfs
*get,_PCGITER,active,,solu,cgiter
/post1
! ****** Begin Command Snippet ******

/POST1
SET, 1

! Select supported elements
ALLSEL
ESEL, S, ENAME, , 185 ! SOLID185 (linear hexahedral/prismatic/pyramidal/tetrahedral element)
ESEL, A, ENAME, , 186 ! SOLID186 (quadratic hexahedral element)
ESEL, A, ENAME, , 187 ! SOLID187 (quadratic tetrahedral element)
ESEL, A, ENAME, , 285 ! SOLID186 (linear tetrahedral element)

! Select all nodes of the currently selected elements
NSLE

! Refine the selection to contain only corner nodes
NSLE,R,CORNER

! Prevent page breaks
/PAGE, , , 1E9, 240,

! 15 characters per column, 6 of which are decimal digits
/FORMAT, , , 15, 6, ,

! Disable summaries
/HEADER, off, off, off, off, on, off

! Output node coordinates
/OUTPUT, nodes, txt
NLIST, , , , COORD
/OUTPUT

! Output element types
/OUTPUT, types, txt
ETLIST
/OUTPUT

! Output element connectivity
/OUTPUT, elements, txt
ELIST, ALL, , , 0, 0
/OUTPUT

! Output stresses
/OUTPUT, stresses, txt
PRNSOL, S
/OUTPUT

! ****** End   Command Snippet ******
fini
