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/batch
! ANSYS input file written by Workbench version 2025 R2
! File used for geometry attach: C:\Users\nicol\Desktop\TEST01.step
/title,TEST01--Static Structural (A5)
/COM,/COM,     ANSYSMotion, 2025.2
/com,--- Data in consistent NMM units. See Solving Units in the help system for more information.
/units,MPA
/prep7
! Turn off shape checking because checks already performed inside WB mesher.
! See help system for more information.
SHPP,OFF,,NOWARN
etcon,set             ! allow ANSYS to choose best KEYOP's for 180x elements, resets any applicable keyopt to MAPDL defaults
/com,*********** Send User Defined Coordinate System(s) ***********
csys,0
/com,*********** Nodes for the whole assembly ***********
nblock,3,,6065
(1i9,3e20.9e3)
        1    -5.000000000E+01    -2.000000000E+01     2.799999952E+00
        2    -5.000000000E+01    -2.000000000E+01     0.000000000E+00
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-1
/com,*********** Elements for Body 1 'TEST01|TEST01' ***********
et,1,186
keyo,1,2,1          ! set full integration on SOLID186
MAT,1 $ TYPE,1 $ REAL,1 $ SECNUM,1 $ ESYS,0
eblock,11,COMPACT,,732
(11i9)
        1     1615     1617     1295      986     1616     1618     1296      988     5507     1691
     4542     5493     5509     1975     4543     5494     5489     5508     4544     3931
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-1
secnum,1    ! reset the section ID to default
toffst,273.15,      ! Temperature offset from absolute zero
/com,*********** Set Reference Temperature ***********
tref,22.
/com,*********** Send Materials ***********
Temperature = 'TEMP' ! Temperature
MP,DENS,1,7.85e-09,	! tonne mm^-3
MP,ALPX,1,1.2e-05,	! C^-1
MP,C,1,434000000,	! mm^2 s^-2 C^-1
MP,KXX,1,60.5,	! tonne mm s^-3 C^-1
MP,RSVX,1,0.00017,	! ohm mm
MP,EX,1,200000,	! tonne s^-2 mm^-1
MP,NUXY,1,0.3,
MP,MURX,1,10000,

!************************* Model Summary ********************
!TEST01|TEST01,	Structural Steel,	matid,	1
!************************* End Model Summary ********************
et,2,200,7
MAT,0 $ TYPE,2 $ REAL,0 $ SECNUM,2 $ ESYS,0
eblock,11,COMPACT,,732
(11i9)
     2353     1616     1618     1296      988     5509     1975     4543     5494
     2354     1614     1620     1254     1142     5514     1928     4442     5483
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-1
secnum,1    ! reset the section ID to default
CMBLOCK,MOLD    ,ELEM,        2
(8i10)
      2353     -3084
CMBLOCK,SUPPORT_1,NODE,        1
(8i10)
       329
CMBLOCK,SUPPORT_2,NODE,        1
(8i10)
       301
CMBLOCK,SUPPORT_3,NODE,        1
(8i10)
       639
/com,*********** Define Force Without Surface Effect Elements "Force X" ***********
local,12,0,0.,0.,0.,0.,0.,0.
csys,0
CMBLOCK,_CM69_3 ,ELEM,        2
(8i10)
       453      -592
CMBLOCK,_CM69_5 ,ELEM,        2
(8i10)
       453      -592
/com,*********** Define Force Without Surface Effect Elements "Force -X" ***********
local,13,0,0.,0.,0.,0.,0.,0.
csys,0
CMBLOCK,_CM218_3,ELEM,        2
(8i10)
       593      -732
CMBLOCK,_CM218_5,ELEM,        2
(8i10)
       593      -732
/com,*********** Create Direct FE , Displacements ****
CMBLOCK,_CM240U ,NODE,        1
(8i10)
       329
/com,*********** Create Direct FE , Displacements ****
CMBLOCK,_CM242U ,NODE,        1
(8i10)
       301
/com,*********** Create Direct FE , Displacements ****
CMBLOCK,_CM245U ,NODE,        1
(8i10)
       639
fini
/com,****************************************************************************
/com,*************************    SOLUTION       ********************************
/com,****************************************************************************
/solu
antype,0                   ! static analysis
_thickRatio=  1     ! Ratio of thick parts in the model
eqsl,pcg,1e-8,,,,,,1
cntr,print,1               ! print out contact info and also make no initial contact an error
cncheck,dmp		!	Enable program controlled contact splitting for distributed memory parallel run
dmpoption,emat,no             ! Don't combine emat file for DANSYS
dmpoption,esav,no             ! Don't combine esav file for DANSYS
nldiag,cont,iter           ! print out contact info each equilibrium iteration
rescontrol,,none                 ! Do not keep any restart files
/com,****************************************************
/com,******************* SOLVE FOR LS 1 OF 1 ****************
/com,*********** Set Force Without Surface Effect Elements "Force X" ***********
sfco,1,0,12,,,,,1   ! set and send X component values
sfe,_CM69_3,3,pres,1,0.416666666666697
sfe,_CM69_5,5,pres,1,0.416666666666697
sfco,1,1,12,,,,,1   ! set and send Y component values
sfe,_CM69_3,3,pres,1,0.
sfe,_CM69_5,5,pres,1,0.
sfco,1,2,12,,,,,1   ! set and send Z component values
sfe,_CM69_3,3,pres,1,0.
sfe,_CM69_5,5,pres,1,0.
nsel,all
esel,all
/com,*********** Set Force Without Surface Effect Elements "Force -X" ***********
sfco,1,0,13,,,,,1   ! set and send X component values
sfe,_CM218_3,3,pres,1,-0.416666666666697
sfe,_CM218_5,5,pres,1,-0.416666666666697
sfco,1,1,13,,,,,1   ! set and send Y component values
sfe,_CM218_3,3,pres,1,0.
sfe,_CM218_5,5,pres,1,0.
sfco,1,2,13,,,,,1   ! set and send Z component values
sfe,_CM218_3,3,pres,1,0.
sfe,_CM218_5,5,pres,1,0.
nsel,all
esel,all
sfco,none		! resets the sfcontrol
/com,**** Set Direct FE , Displacements ****
d,_CM240U,ux,0.
d,_CM240U,uy,0.
d,_CM240U,uz,0.
/com,**** Set Direct FE , Displacements ****
d,_CM242U,uz,0.
/com,**** Set Direct FE , Displacements ****
d,_CM245U,uy,0.
d,_CM245U,uz,0.
nsub,1,1,1
time,1.
outres,erase
outres,all,none
outres,nsol,all,
outres,rsol,all
outres,eangl,all
outres,etmp,all
outres,veng,all
outres,strs,all,
outres,epel,all,
outres,eppl,all,
outres,cont,all,
! *********** WB SOLVE COMMAND ***********
! check interactive state
*get,ANSINTER_,active,,int
*if,ANSINTER_,ne,0,then
/eof
*endif
solve
/com *************** Write FE CONNECTORS *********
CEWRITE,file,ce,,INTE
/com,****************************************************
/com,*************** FINISHED SOLVE FOR LS 1 *************
*get,_NSOLTHREADS,active,0,ntfs
*get,_NSOLPROCESSES,active,0,npfs
*get,_PCGITER,active,,solu,cgiter
/post1
! ****** Begin Command Snippet ******
!   Commands inserted into this file will be executed immediately after the ANSYS /POST1 command.

!   Active UNIT system in Workbench when this object was created:  Metric (mm, t, N, s, mV, mA)
!   NOTE:  Any data that requires units (such as mass) is assumed to be in the consistent solver unit system.
!                See Solving Units in the help system for more information.

/POST1
SET, 1

! Select supported elements
ALLSEL
ESEL, S, ENAME, , 185 ! SOLID185 (linear hexahedral/prismatic/pyramidal/tetrahedral element)
ESEL, A, ENAME, , 186 ! SOLID186 (quadratic hexahedral element)
ESEL, A, ENAME, , 187 ! SOLID187 (quadratic tetrahedral element)
ESEL, A, ENAME, , 285 ! SOLID186 (linear tetrahedral element)

! Select all nodes of the currently selected elements
NSLE

! Refine the selection to contain only corner nodes
NSLE,R,CORNER

! Prevent page breaks
/PAGE, , , 1E9, 240,

! 15 characters per column, 6 of which are decimal digits
/FORMAT, , , 15, 6, ,

! Disable summaries
/HEADER, off, off, off, off, on, off

! Output node coordinates
/OUTPUT, nodes, txt
NLIST, , , , COORD
/OUTPUT

! Output element types
/OUTPUT, types, txt
ETLIST
/OUTPUT

! Output element connectivity
/OUTPUT, elements, txt
ELIST, ALL, , , 0, 0
/OUTPUT

! Output stresses
/OUTPUT, stresses, txt
PRNSOL, S
/OUTPUT

! ****** End   Command Snippet ******
fini
