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/batch
! ANSYS input file written by Workbench version 2025 R2
! File used for geometry attach: C:\Users\nicol\Desktop\TEST02_with_symmetries.step
/title,wbnew--Static Structural (A5)
/COM,/COM,     ANSYSMotion, 2025.2
/com,--- Data in consistent NMM units. See Solving Units in the help system for more information.
/units,MPA
/prep7
! Turn off shape checking because checks already performed inside WB mesher.
! See help system for more information.
SHPP,OFF,,NOWARN
etcon,set             ! allow ANSYS to choose best KEYOP's for 180x elements, resets any applicable keyopt to MAPDL defaults
/com,*********** Send User Defined Coordinate System(s) ***********
csys,0
/com,*********** Nodes for the whole assembly ***********
nblock,3,,10298
(1i9,3e20.9e3)
        1     3.136363636E+01     2.000000000E+01     0.000000000E+00
        2     3.000000000E+01     2.000000000E+01     0.000000000E+00
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-1
/com,*********** Elements for Body 1 'TEST02|TEST02' ***********
et,1,186
keyo,1,2,1          ! set full integration on SOLID186
MAT,1 $ TYPE,1 $ REAL,1 $ SECNUM,1 $ ESYS,0
eblock,11,COMPACT,,1262
(11i9)
        1     2735     2733     2144     2438     2736     2734     2146     2440     3016     9361
     8898     2978     3188     9362     8900     3073     3187     9360     8176     8899
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-1
secnum,1    ! reset the section ID to default
toffst,273.15,      ! Temperature offset from absolute zero
/com,*********** Set Reference Temperature ***********
tref,22.
/com,*********** Send Materials ***********
Temperature = 'TEMP' ! Temperature
MP,DENS,1,7.85e-09,	! tonne mm^-3
MP,ALPX,1,1.2e-05,	! C^-1
MP,C,1,434000000,	! mm^2 s^-2 C^-1
MP,KXX,1,60.5,	! tonne mm s^-3 C^-1
MP,RSVX,1,0.00017,	! ohm mm
MP,EX,1,200000,	! tonne s^-2 mm^-1
MP,NUXY,1,0.3,
MP,MURX,1,10000,

!************************* Model Summary ********************
!TEST02|TEST02,	Structural Steel,	matid,	1
!************************* End Model Summary ********************
CMBLOCK,SUPPORT_1,NODE,        1
(8i10)
       705
et,2,200,7
MAT,0 $ TYPE,2 $ REAL,0 $ SECNUM,2 $ ESYS,0
eblock,11,COMPACT,,1262
(11i9)
     3997     2736     2734     2146     2440     3188     9362     8900     3073
     3998     2734     2732     2052     2146     3189     9359     8177     9362
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-1
secnum,1    ! reset the section ID to default
CMBLOCK,MOLD    ,ELEM,        2
(8i10)
      3997     -5258
et,3,200,7
MAT,0 $ TYPE,3 $ REAL,0 $ SECNUM,3 $ ESYS,0
eblock,11,COMPACT,,10
(11i9)
     5259     2735     2733     2734     2736     3016     9360     3188     3187
     5260     2733     2731     2732     2734     3017     9357     3189     9360
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-1
secnum,1    ! reset the section ID to default
CMBLOCK,HOLE    ,ELEM,        2
(8i10)
      5259     -5268
/com,********* Frictionless Supports Y *********
CMBLOCK,_FRICSUY,NODE,      139
(8i10)
        61       -64        95        96       127       128       159       160
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cmsel,s,_FRICSUY
d,all,uy,0
nsel,all
/com,********* Frictionless Supports Z *********
CMBLOCK,_FRICSUZ,NODE,     3770
(8i10)
         5        -8        11        12        15        16        19        20
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cmsel,s,_FRICSUZ
d,all,uz,0
nsel,all
/com,*********** Define Force Without Surface Effect Elements "Force" ***********
local,12,0,0.,0.,0.,0.,0.,0.
csys,0
CMBLOCK,_CM56_1 ,ELEM,        2
(8i10)
       933     -1262
/com,*********** Create Bearing Load ***********
et,4,154
MAT,4 $ TYPE,4 $ REAL,4 $ SECNUM,4 $ ESYS,0
eblock,11,COMPACT,,10
(11i9)
     5269     2726     2728     2727     2725     3192     9351     3020     9348
     5270     2728     2730     2729     2727     3191     9354     3019     9351
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-1
secnum,1    ! reset the section ID to default
esel,s,type,,4
keyop,4,7,1         ! Use original area so load is constant in large deformation
esel,all
/com,*********** Create Direct FE , Displacements ****
CMBLOCK,_CM64U  ,NODE,        1
(8i10)
       705
fini
/com,****************************************************************************
/com,*************************    SOLUTION       ********************************
/com,****************************************************************************
/solu
antype,0                   ! static analysis
_thickRatio=  1     ! Ratio of thick parts in the model
eqsl,pcg,1e-8,,,,,,1
cntr,print,1               ! print out contact info and also make no initial contact an error
cncheck,dmp		!	Enable program controlled contact splitting for distributed memory parallel run
dmpoption,emat,no             ! Don't combine emat file for DANSYS
dmpoption,esav,no             ! Don't combine esav file for DANSYS
nldiag,cont,iter           ! print out contact info each equilibrium iteration
rescontrol,,none                 ! Do not keep any restart files
/com,****************************************************
/com,******************* SOLVE FOR LS 1 OF 1 ****************
/com,*********** Set Force Without Surface Effect Elements "Force" ***********
sfco,1,0,12,,,,,1   ! set and send X component values
sfe,_CM56_1,1,pres,1,0.166666666666679
sfco,1,1,12,,,,,1   ! set and send Y component values
sfe,_CM56_1,1,pres,1,0.
sfco,1,2,12,,,,,1   ! set and send Z component values
sfe,_CM56_1,1,pres,1,0.
nsel,all
esel,all
sfco,none		! resets the sfcontrol
esel,s,type,,4
sfe,all,5,pres,0,0.0,1.,0.,0.
local,11,0,0,0,0,180.,0.,0.
csys,0
*set,_v1,-1.
*set,_v2,0.
*set,_v3,0.
*get,_necurr,elem,,count
_ecurr=0
_total=0
*do,_i,1,_necurr
  _ecurr = ELNEXT(_ecurr)
  _normx = NORMNX(NELEM(_ecurr,1),NELEM(_ecurr,2),NELEM(_ecurr,3))
  _normy = NORMNY(NELEM(_ecurr,1),NELEM(_ecurr,2),NELEM(_ecurr,3))
  _normz = NORMNZ(NELEM(_ecurr,1),NELEM(_ecurr,2),NELEM(_ecurr,3))
  _normmag = sqrt(_normx*_normx + _normy*_normy + _normz*_normz )
  _normx = _normx/_normmag
  _normy = _normy/_normmag
  _normz = _normz/_normmag
  _dot = _normx*_v1+_normy*_v2+_normz*_v3
  *if,_dot,gt,-.00001,then
    esel,u,elem,,_ecurr
  *else
    csys,11
    *get,_indd,elem,_ecurr,aproj,x
    csys,0
    _total=_total+_indd
  *endif
*enddo
*get,_necurr,elem,,count
*if,_necurr,eq,0,then
  *msg,error
  NO ELEMENTS ARE SELECTED TO APPLY BEARING LOAD TO. &
  IT IS LIKELY THAT THE BEARING LOAD IS IN THE WRONG DIRECTION
*endif
*set,_mag,100.
_mag=_mag/_total
sfe,all,5,pres,0,_mag,-100.,0.,0.
nsel,all
esel,all
/com,**** Set Direct FE , Displacements ****
d,_CM64U,ux,0.
nsub,1,1,1
time,1.
outres,erase
outres,all,none
outres,nsol,all,
outres,rsol,all
outres,eangl,all
outres,etmp,all
outres,veng,all
outres,strs,all,
outres,epel,all,
outres,eppl,all,
outres,cont,all,
! *********** WB SOLVE COMMAND ***********
! check interactive state
*get,ANSINTER_,active,,int
*if,ANSINTER_,ne,0,then
/eof
*endif
solve
/com *************** Write FE CONNECTORS *********
CEWRITE,file,ce,,INTE
/com,****************************************************
/com,*************** FINISHED SOLVE FOR LS 1 *************
*get,_NSOLTHREADS,active,0,ntfs
*get,_NSOLPROCESSES,active,0,npfs
*get,_PCGITER,active,,solu,cgiter
/post1
fini
