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/batch
! ANSYS input file written by Workbench version 2025 R2
! File used for geometry attach: C:\Users\nicol\Desktop\c_beam.step
/title,c_beam--Static Structural (A5)
/COM,/COM,     ANSYSMotion, 2025.2
/com,--- Data in consistent NMM units. See Solving Units in the help system for more information.
/units,MPA
/prep7
! Turn off shape checking because checks already performed inside WB mesher.
! See help system for more information.
SHPP,OFF,,NOWARN
etcon,set             ! allow ANSYS to choose best KEYOP's for 180x elements, resets any applicable keyopt to MAPDL defaults
/com,*********** Send User Defined Coordinate System(s) ***********
csys,0
/com,*********** Nodes for the whole assembly ***********
nblock,3,,6154
(1i9,3e20.9e3)
        1     1.500000000E+01    -2.000000000E+02     4.720000000E+01
        2     2.000000000E+01    -2.000000000E+02     4.720000000E+01
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-1
/com,*********** Elements for Body 1 'C Beam' ***********
et,1,186
keyo,1,2,1          ! set full integration on SOLID186
MAT,1 $ TYPE,1 $ REAL,1 $ SECNUM,1 $ ESYS,0
eblock,11,COMPACT,,756
(11i9)
        1      699      905      880      862      852     1058      879      861     3636     4147
     4112     3635     4093     4145     4110     4092     3634     4205     4144     4109
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-1
secnum,1    ! reset the section ID to default
toffst,273.15,      ! Temperature offset from absolute zero
/com,*********** Set Reference Temperature ***********
tref,22.
/com,*********** Send Materials ***********
Temperature = 'TEMP' ! Temperature
MP,DENS,1,7.85e-09,	! tonne mm^-3
MP,ALPX,1,1.2e-05,	! C^-1
MP,C,1,434000000,	! mm^2 s^-2 C^-1
MP,KXX,1,60.5,	! tonne mm s^-3 C^-1
MP,RSVX,1,0.00017,	! ohm mm
MP,EX,1,200000,	! tonne s^-2 mm^-1
MP,NUXY,1,0.3,
MP,MURX,1,10000,

!************************* Model Summary ********************
!C Beam,	Plastic, PA6,	matid,	1
!************************* End Model Summary ********************
et,2,200,7
MAT,0 $ TYPE,2 $ REAL,0 $ SECNUM,2 $ ESYS,0
eblock,11,COMPACT,,756
(11i9)
     2389      905      880      879     1058     4147     4144     4145     4205
     2390      880      905      914      881     4147     4204     4149     4146
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-1
secnum,1    ! reset the section ID to default
CMBLOCK,MOLD    ,ELEM,        2
(8i10)
      2389     -3144
/com,*********** Fixed Supports ***********
CMBLOCK,_FIXEDSU,NODE,      126
(8i10)
         1       -86      1635     -1637      1639      1640      1642      1643
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cmsel,s,_FIXEDSU
d,all,all
nsel,all
/com,*********** Define Force Without Surface Effect Elements "Force" ***********
local,12,0,0.,0.,0.,0.,0.,0.
csys,0
CMBLOCK,_CM41_1 ,ELEM,        5
(8i10)
       163       235       487       559       739
CMBLOCK,_CM41_6 ,ELEM,       37
(8i10)
         1        19        37        55        73        91       109       127
       145       181       199       217       253       271       289       307
       325       343       361       379       397       415       433       451
       469       505       523       541       577       595       613       631
       649       667       685       703       721
tblist
fini
/com,****************************************************************************
/com,*************************    SOLUTION       ********************************
/com,****************************************************************************
/solu
antype,0                   ! static analysis
_thickRatio=  0     ! Ratio of thick parts in the model
eqsl,sparse,,,,,1
cntr,print,1               ! print out contact info and also make no initial contact an error
cncheck,dmp		!	Enable program controlled contact splitting for distributed memory parallel run
dmpoption,emat,no             ! Don't combine emat file for DANSYS
dmpoption,esav,no             ! Don't combine esav file for DANSYS
nldiag,cont,iter           ! print out contact info each equilibrium iteration
rescontrol,define,last,last,,dele	   ! Program Controlled
/com,****************************************************
/com,******************* SOLVE FOR LS 1 OF 1 ****************
/com,*********** Set Force Without Surface Effect Elements "Force" ***********
sfco,1,0,12,,,,,1   ! set and send X component values
sfe,_CM41_1,1,pres,1,0.
sfe,_CM41_6,6,pres,1,0.
sfco,1,1,12,,,,,1   ! set and send Y component values
sfe,_CM41_1,1,pres,1,0.
sfe,_CM41_6,6,pres,1,0.
sfco,1,2,12,,,,,1   ! set and send Z component values
sfe,_CM41_1,1,pres,1,1.72519142745407e-002
sfe,_CM41_6,6,pres,1,1.72519142745407e-002
nsel,all
esel,all
sfco,none		! resets the sfcontrol
autots,on                  ! Workbench Program Controlled automatic time stepping
nsub,5,1000,1              ! due to presence of nonlinear materials
time,1.
outres,erase
outres,all,none
outres,nsol,all,
outres,rsol,all
outres,eangl,all
outres,etmp,all
outres,veng,all
outres,strs,all,
outres,epel,all,
outres,eppl,all,
outres,cont,all,
! *********** WB SOLVE COMMAND ***********
! check interactive state
*get,ANSINTER_,active,,int
*if,ANSINTER_,ne,0,then
/eof
*endif
solve
/com *************** Write FE CONNECTORS *********
CEWRITE,file,ce,,INTE
/com,****************************************************
/com,*************** FINISHED SOLVE FOR LS 1 *************
*get,_NSOLTHREADS,active,0,ntfs
*get,_NSOLPROCESSES,active,0,npfs
/post1
fini
